R_z := 1.5 Ω*8  # .. Innenwiderstand pro Zünder mal Anzahl
R_v := 1 kΩ  # .. Vorwiderstand
U_E := 12 V  # .. Eingangsspannung
# Messen
I_m := U_E/(R_z + R_v) = 0.0118577 A  # .. Strom am Messpunkt
U_z := I_m*R_z = 0.142292 V  # .. Spannung die an den Zündern abfällt
# Verstärker
R_1 := 10 kΩ
Q := 470 nF
R_2 := 220 kΩ
3.3 V/U_z = 23.1917  # .. höchstmögliche Verstärkungsfaktor
V := 1 + (R_2/R_1) = 23  # .. durch die Widerstände generierter Verstärkungsfaktor (muss unter höchstmöglichen Verstärkungsfaktor liegen)
1/(2*π*R_2*Q) = 1.53922 1/s  # .. Grenzfrequenz - hat man eine höhere werden auch Störsignale verstärkt => schlecht
