# Bauteile
# Zündkondensator
# Geforderte Energie laut Datenblatt:
# Typ-A Zünder: | 4*mWs/Ω
# Typ-U Zünder: | 16*mWs/Ω
# Kondensator Berechnng:
Q := C*dU == I*t  # error: Diese Variable ist nicht definiert. Prüfen Sie, ob die Beschriftung richtig festgelegt ist.
# .. Höchstens 10ms darf Zündspannung anliegen
C := I*t/dU  # error: Diese Variable ist nicht definiert. Prüfen Sie, ob die Beschriftung richtig festgelegt ist.
2 A*10 ms/(2 V) = 0.01 F  # .. 2A Zündstrom
# .. ~2V Abfall am Kondensator
E := C*U^2/2  # error: Diese Variable ist nicht definiert. Prüfen Sie, ob die Beschriftung richtig festgelegt ist.
10 m*12^2/2 = 720 m  # Ws
E := 720*mWs  # error: Diese Variable ist nicht definiert. Prüfen Sie, ob die Beschriftung richtig festgelegt ist.
# Kondensator Energie einsetzen:
E == 4*mWs/Ω*1.5*Ω*n solve, n → 120.0  # .. Höchstens 120 Typ-A Zünder
E == 16*mWs/Ω*1.5*Ω*n solve, n → 30.0  # .. Höchstens 30 Typ-B Zünder
# Vorwiderstand Grüne LEDS | Widerstand nach E12:
I_L := 20 mA
U_L := 2.1 V
U_Eingang := 3.3 V
U_widerstand := U_Eingang - U_L = 1.2 V
R_V := U_widerstand/I_L = 60 Ω  # => Vorwiderstand von 100 Ohm
U_Eingang := 5 V
U_widerstand := U_Eingang - U_L = 2.9 V
R_V := U_widerstand/I_L = 145 Ω  # => Vorwiderstand von 150 Ohm
U_Eingang := 12 V
U_widerstand := U_Eingang - U_L = 9.9 V
R_V := U_widerstand/I_L = 495 Ω  # => Vorwiderstand von 560 Ohm
# Vorwiderstand Ohmsche Messung
I_Dmax := 300 mA
U_Dmax := 1 V
U_Dmax := 0.7 V  # ..betrieb nie auf ganz max
U_Eingang := 12 V
U_widerstand := U_Eingang - U_Dmax = 11.3 V
R_V := U_widerstand/I_Dmax = 37.6667 Ω  # => Vorwiderstand von 39 Ohm
